*Heading
** Generated by OSAM INP Converter

*Part, name=CompisteIGriderBridgeSpans100_SA

*NODE
1,           0, -3.3975e-13,-1.43894e-12
2,        1000, -3.3975e-13,-1.43894e-12
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

*ELEMENT,  TYPE=B31
1,       1,       2
2,       3,       4
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
*ELEMENT,  TYPE=S4R
20006,   20011,   20012,   20013,   20014
20007,   20015,   20016,   20017,   20018
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

*ELSET, ELSET=set0
   1,    2,    3,    4,    5,    6
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
** Section: I-ShapeGirders_S355  Profile: I-ShapeGirders_S355
*Beam General Section, elset=set0, material=S355, section=I
200.0, 1200.0, 500.0, 500.0, 25.0, 25.0, 16.0
0.0, 1.0, 0.0

*ELSET, ELSET=set1
10001, 10002, 10003, 10004, 10005, 10006
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
** Section: Rigid_Rigid  Profile: Rigid_Rigid
*Beam General Section, elset=set1, material=Rigid, section=RECT
100.0, 100.0
1.0, 0.0, 0.0

*ELSET, ELSET=set2
20006, 20007, 20008, 20009, 20010, 20011
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
*Shell Section, ELSET=set2, MATERIAL=C40/50
200.0

*End Part

*ASSEMBLY, NAME=CompisteIGriderBridgeSpans100_SA

*INSTANCE, NAME=CompisteIGriderBridgeSpans100_SA-1, PART=CompisteIGriderBridgeSpans100_SA

*END INSTANCE


*END ASSEMBLY

**
** MATERIALS
**
*Material, name=C40/50
*Density
2.5e-09,
*Elastic
35000.0, 0.2
*Material, name=S355
*Density
7.8e-09,
*Elastic
210000.0, 0.3
*Material, name=Rigid
*Elastic
100000000.0, 0.0
**
** BOUNDARY CONDITIONS
**

*Step, name=Step-1, nlgeom=NO, inc=5
*Static, direct
0.2, 1.,
**
** OUTPUT REQUESTS
**
*RESTART, WRITE, FREQUENCY=0
*OUTPUT, FIELD, VARIABLE=PRESELECT
*OUTPUT, HISTORY, VARIABLE=PRESELECT
*END STEP
