*Heading
** Job name: EBF2_3_SS_BUCKLE Model name: Model-1
** Generated by: Abaqus/CAE 2017
*Preprint, echo=NO, model=NO, history=NO, contact=NO
**
** PARTS
**
*Part, name=EBF_2_2_2
*End Part
**
**
** ASSEMBLY
**
*Assembly, name=Assembly
**
*Instance, name=EBF_2_2_2-1, part=EBF_2_2_2
*Node
      1,        4310.,          95.,       13575.
      2,        4310.,          95.,       13125.
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*Element, type=S4R
 1,    1,  297, 6037,  318
 2,  297,  298, 6038, 6037
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*Element, type=B31
4750,  276, 2545
4751, 2545, 2544
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*Element, type=S3
8238, 8492, 8491, 8486
8239, 8496, 8489, 8488
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*Nset, nset=_PickedSet2_#29, internal
  145,  146,  147,  149,  152,  154
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*Elset, elset=_PickedSet2_#29, internal
 2276, 2277, 2278, 2279, 2280, 2281
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*Nset, nset=_PickedSet3_#30, internal
  149,  154,  162,  170,  178,  180
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*Elset, elset=_PickedSet3_#30, internal
 1722, 1723, 1724, 1725, 1726, 1727
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*Nset, nset=_PickedSet4_#31, internal
  142,  148,  149,  153,  154,  155
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*Elset, elset=_PickedSet4_#31, internal
 1362, 1363, 1364, 1365, 1366, 1367
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*Nset, nset=_PickedSet5_#32, internal
  143,  144,  147,  150,  151,  152
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*Elset, elset=_PickedSet5_#32, internal
 1338, 1339, 1340, 1341, 1342, 1343
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*Nset, nset=_PickedSet2_#33, internal
  150,  151,  152,  177,  178,  179
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*Elset, elset=_PickedSet2_#33, internal, generate
 4446,  4613,     1
*Nset, nset=_PickedSet2_#34, internal
  294,  296, 5712, 5713, 5714, 5715
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*Elset, elset=_PickedSet2_#34, internal, generate
 8003,  8138,     1
*Nset, nset=_PickedSet3_#35, internal
  234,  294,  295, 5459, 5460, 5461
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*Elset, elset=_PickedSet3_#35, internal, generate
 7747,  7838,     1
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*Elset, elset=_PickedSet5_#37, internal, generate
 7839,  8002,     1
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*Elset, elset=_PickedSet2_#39, internal, generate
 6259,  6394,     1
*Nset, nset=_PickedSet3_#40, internal
  237,  283,  284, 3735, 3736, 3737
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*Elset, elset=_PickedSet3_#40, internal, generate
 6003,  6094,     1
*Nset, nset=_PickedSet4_#41, internal
  237,  285, 3825, 3826, 3827, 3828
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*Elset, elset=_PickedSet4_#41, internal, generate
 6095,  6258,     1
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*Elset, elset=_PickedSet2_#43, internal
 2740, 2741, 2742, 2743, 2744, 2745
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*Nset, nset=_PickedSet3_#44, internal
  108,  109,  110,  113,  114,  115
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*Elset, elset=_PickedSet3_#44, internal
  954,  955,  956,  957,  958,  959
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*Nset, nset=_PickedSet4_#45, internal
  108,  115,  125,  128,  131,  132
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*Elset, elset=_PickedSet4_#45, internal
 1146, 1147, 1148, 1149, 1150, 1151
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*Nset, nset=_PickedSet5_#46, internal
  105,  111,  112,  116,  117,  118
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*Elset, elset=_PickedSet5_#46, internal
  981,  982,  983,  984,  985,  986
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*Nset, nset=_PickedSet2_#47, internal
  121,  122,  123,  124,  125,  126
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*Elset, elset=_PickedSet2_#47, internal, generate
 4125,  4292,     1
*Nset, nset=_PickedSet2_#48, internal
  291,  294, 5847, 5848, 5849, 5850
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*Elset, elset=_PickedSet2_#48, internal, generate
 8139,  8237,     1
*Nset, nset=_PickedSet3_#49, internal
  242,  291,  293, 5224, 5225, 5226
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*Elset, elset=_PickedSet3_#49, internal, generate
 7509,  7606,     1
*Nset, nset=_PickedSet4_#50, internal
  242,  294, 5320, 5321, 5322, 5323
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*Elset, elset=_PickedSet4_#50, internal, generate
 7607,  7746,     1
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*Elset, elset=_PickedSet2_#52, internal, generate
 6395,  6493,     1
*Nset, nset=_PickedSet3_#53, internal
  243,  280,  282, 3500, 3501, 3502
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*Elset, elset=_PickedSet3_#53, internal, generate
 5765,  5862,     1
*Nset, nset=_PickedSet4_#54, internal
  243,  283, 3596, 3597, 3598, 3599
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*Elset, elset=_PickedSet4_#54, internal, generate
 5863,  6002,     1
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*Elset, elset=_PickedSet2_#56, internal
 3010, 3011, 3012, 3013, 3014, 3015
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*Nset, nset=_PickedSet3_#57, internal
    1,    7,    8,    9,   10,   11
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*Elset, elset=_PickedSet3_#57, internal
   37,   38,   39,   40,   41,   42
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*Nset, nset=_PickedSet4_#58, internal
    8,   11,   19,   91,   92,   97
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*Elset, elset=_PickedSet4_#58, internal
  789,  790,  791,  792,  793,  794
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*Nset, nset=_PickedSet5_#59, internal
    2,    3,    6,   12,   13,   14
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*Elset, elset=_PickedSet5_#59, internal
   67,   68,   69,   70,   71,   72
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*Nset, nset=_PickedSet2_#60, internal
   17,   18,   19,   20,   21,   22
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*Elset, elset=_PickedSet2_#60, internal, generate
 3818,  3961,     1
*Nset, nset=_PickedSet2_#61, internal
  289,  291, 4892, 4893, 4894, 4895
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*Elset, elset=_PickedSet2_#61, internal, generate
 7173,  7271,     1
*Nset, nset=_PickedSet3_#62, internal
  249,  289,  292, 5128, 5129, 5130
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*Elset, elset=_PickedSet3_#62, internal, generate
 7411,  7508,     1
*Nset, nset=_PickedSet4_#63, internal
  249,  291, 4990, 4991, 4992, 4993
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*Elset, elset=_PickedSet4_#63, internal, generate
 7272,  7410,     1
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*Elset, elset=_PickedSet2_#65, internal, generate
 5429,  5527,     1
*Nset, nset=_PickedSet3_#66, internal
  248,  278,  281, 3404, 3405, 3406
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*Elset, elset=_PickedSet3_#66, internal, generate
 5667,  5764,     1
*Nset, nset=_PickedSet4_#67, internal
  248,  280, 3266, 3267, 3268, 3269
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*Elset, elset=_PickedSet4_#67, internal, generate
 5528,  5666,     1
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*Elset, elset=_PickedSet2_#69, internal
 3246, 3247, 3248, 3249, 3250, 3251
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*Elset, elset=_PickedSet4_#71, internal
  424,  425,  426,  427,  428,  429
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*Nset, nset=_PickedSet5_#72, internal
   53,   59,   60,   64,   65,   66
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*Elset, elset=_PickedSet5_#72, internal
  451,  452,  453,  454,  455,  456
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*Nset, nset=_PickedSet2_#73, internal
   64,   65,   71,   72,   73,   74
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*Elset, elset=_PickedSet2_#73, internal, generate
 8422,  8543,     1
*Nset, nset=_PickedSet2_#74, internal
  288,  289, 4557, 4558, 4559, 4560
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*Elset, elset=_PickedSet2_#74, internal, generate
 6834,  6932,     1
*Nset, nset=_PickedSet3_#75, internal
  254,  288,  290, 4655, 4656, 4657
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*Elset, elset=_PickedSet3_#75, internal, generate
 6933,  7032,     1
*Nset, nset=_PickedSet4_#76, internal
  254,  289, 4753, 4754, 4755, 4756
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*Elset, elset=_PickedSet4_#76, internal, generate
 7033,  7172,     1
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*Elset, elset=_PickedSet2_#78, internal, generate
 5090,  5188,     1
*Nset, nset=_PickedSet3_#79, internal
  255,  277,  279, 2931, 2932, 2933
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*Elset, elset=_PickedSet3_#79, internal, generate
 5189,  5288,     1
*Nset, nset=_PickedSet4_#80, internal
  255,  278, 3029, 3030, 3031, 3032
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*Elset, elset=_PickedSet4_#80, internal, generate
 5289,  5428,     1
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*Elset, elset=_PickedSet2_#82, internal
 3440, 3441, 3442, 3443, 3444, 3445
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*Elset, elset=_PickedSet5_#85, internal
  289,  290,  291,  292,  293,  294
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*Nset, nset=_PickedSet6_#86, internal
   29,   30,   31,   32,   33,   34
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*Elset, elset=_PickedSet6_#86, internal
  214,  215,  216,  217,  218,  219
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*Nset, nset=_PickedSet2_#87, internal
   35,   36,   37,   38,   39,   40
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*Elset, elset=_PickedSet2_#87, internal, generate
 8330,  8421,     1
*Nset, nset=_PickedSet2_#88, internal
  287,  288, 4270, 4271, 4272, 4273
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*Elset, elset=_PickedSet2_#88, internal, generate
 6544,  6642,     1
*Nset, nset=_PickedSet3_#89, internal
  264,  286,  287, 4221, 4222, 4223
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*Elset, elset=_PickedSet3_#89, internal
 6494, 6495, 6496, 6497, 6498, 6499
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*Nset, nset=_PickedSet4_#90, internal
  264,  288, 4368, 4369, 4370, 4371
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*Elset, elset=_PickedSet4_#90, internal, generate
 6643,  6783,     1
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*Elset, elset=_PickedSet2_#92, internal, generate
 4800,  4898,     1
*Nset, nset=_PickedSet3_#93, internal
  265,  275,  276, 2497, 2498, 2499
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*Elset, elset=_PickedSet3_#93, internal
 4750, 4751, 4752, 4753, 4754, 4755
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*Nset, nset=_PickedSet4_#94, internal
  265,  277, 2644, 2645, 2646, 2647
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*Elset, elset=_PickedSet4_#94, internal, generate
 4899,  5039,     1
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*Elset, elset=_PickedSet69, internal
 1296, 1297, 1298, 1299, 1300, 1301
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*Nset, nset=_PickedSet70, internal
  105,  106,  107,  108,  109,  110
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*Elset, elset=_PickedSet70, internal
  912,  913,  914,  915,  916,  917
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*Nset, nset=_PickedSet71, internal
    1,    2,    3,    4,    5,    6
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*Elset, elset=_PickedSet71, internal
   1,   2,   3,   4,   5,   6
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*Nset, nset=_PickedSet72, internal
   53,   54,   55,   56,   57,   58
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*Elset, elset=_PickedSet72, internal
 391, 392, 393, 394, 395, 396
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*Nset, nset=_PickedSet73, internal
   23,   24,   25,   26,   27,   28
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*Elset, elset=_PickedSet73, internal, generate
 8238,  8329,     1
** Section: Interstiff
*Shell Section, elset=_PickedSet71, material=ASS
10., 5
** Section: IPE450_Flange
*Shell Section, elset=_PickedSet3_#57, material=ASS
14.6, 5
** Section: IPE450_Flange
*Shell Section, elset=_PickedSet5_#59, material=ASS
14.6, 5
** Region: (IPE330_Flange:Picked)
*Elset, elset=_I4, internal
  187,  188,  189,  190,  191,  192
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** Section: IPE330_Flange
*Shell Section, elset=_I4, material=ASS
11.5, 5
** Section: IPE330_Flange
*Shell Section, elset=_PickedSet6_#86, material=ASS
11.5, 5
** Section: IPE330_Flange
*Shell Section, elset=_PickedSet5_#85, material=ASS
11.5, 5
** Section: Interstiff
*Shell Section, elset=_PickedSet72, material=ASS
10., 5
** Section: IPE400_Flange
*Shell Section, elset=_PickedSet4_#71, material=ASS
13.5, 5
** Section: IPE400_Flange
*Shell Section, elset=_PickedSet5_#72, material=ASS
13.5, 5
** Region: (IPE400_Flange:Picked)
*Elset, elset=_I10, internal
  615,  616,  617,  618,  619,  620
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** Section: IPE400_Flange
*Shell Section, elset=_I10, material=ASS
13.5, 5
** Section: IPE450_Flange
*Shell Section, elset=_PickedSet4_#58, material=ASS
14.6, 5
** Section: Interstiff
*Shell Section, elset=_PickedSet70, material=ASS
10., 5
** Section: IPE500_Flange
*Shell Section, elset=_PickedSet3_#44, material=ASS
16., 5
** Section: IPE500_Flange
*Shell Section, elset=_PickedSet5_#46, material=ASS
16., 5
** Section: IPE500_Flange
*Shell Section, elset=_PickedSet4_#45, material=ASS
16., 5
** Section: Interstiff
*Shell Section, elset=_PickedSet69, material=ASS
10., 5
** Section: IPE550_Flange
*Shell Section, elset=_PickedSet5_#32, material=ASS
17.2, 5
** Section: IPE550_Flange
*Shell Section, elset=_PickedSet4_#31, material=ASS
17.2, 5
** Section: IPE550_Flange
*Shell Section, elset=_PickedSet3_#30, material=ASS
17.2, 5
** Section: IPE550_Web
*Shell Section, elset=_PickedSet2_#29, material=ASS
11.1, 5
** Section: IPE500_Web
*Shell Section, elset=_PickedSet2_#43, material=ASS
10.2, 5
** Section: IPE450_Web
*Shell Section, elset=_PickedSet2_#56, material=ASS
9.4, 5
** Section: IPE400_Web
*Shell Section, elset=_PickedSet2_#69, material=ASS
8.6, 5
** Section: IPE330_Web
*Shell Section, elset=_PickedSet2_#82, material=ASS
7.5, 5
** Section: IPE450_Flange
*Shell Section, elset=_PickedSet2_#60, material=ASS
14.6, 5
** Section: IPE500_Flange
*Shell Section, elset=_PickedSet2_#47, material=ASS
16., 5
** Section: IPE550_Flange
*Shell Section, elset=_PickedSet2_#33, material=ASS
17.2, 5
** Section: IPE330_WIRE  Profile: IPE330
*Beam Section, elset=_PickedSet3_#93, material=CS355, temperature=GRADIENTS, section=I
165., 330., 160., 160., 11.5, 11.5, 7.5
0.,-1.,0.
** Section: HEA360_WIRE  Profile: HEA360
*Beam Section, elset=_PickedSet2_#92, material=CS355, temperature=GRADIENTS, section=I
175., 350., 300., 300., 17.5, 17.5, 10.
0.,-1.,0.
** Section: IPE450_WIRE  Profile: IPE450
*Beam Section, elset=_PickedSet4_#94, material=CS355, temperature=GRADIENTS, section=I
225., 450., 190., 190., 14.6, 14.6, 9.4
0.,-1.,0.
** Section: HEA360_WIRE  Profile: HEA360
*Beam Section, elset=_PickedSet2_#78, material=CS355, temperature=GRADIENTS, section=I
175., 350., 300., 300., 17.5, 17.5, 10.
0.,-1.,0.
** Section: IPE400_WIRE  Profile: IPE400
*Beam Section, elset=_PickedSet3_#79, material=CS355, temperature=GRADIENTS, section=I
200., 400., 180., 180., 13.5, 13.5, 8.6
0.,-1.,0.
** Section: HEA450_WIRE  Profile: HEA450
*Beam Section, elset=_PickedSet4_#80, material=CS355, temperature=GRADIENTS, section=I
220., 440., 300., 300., 21., 21., 11.5
0.,-1.,0.
** Section: HEA360_WIRE  Profile: HEA360
*Beam Section, elset=_PickedSet2_#65, material=CS355, temperature=GRADIENTS, section=I
175., 350., 300., 300., 17.5, 17.5, 10.
0.,-1.,0.
** Section: HEA500_WIRE  Profile: HEA500
*Beam Section, elset=_PickedSet4_#67, material=CS355, temperature=GRADIENTS, section=I
245., 490., 300., 300., 23., 23., 12.
0.,-1.,0.
** Section: IPE450_WIRE  Profile: IPE450
*Beam Section, elset=_PickedSet3_#66, material=CS355, temperature=GRADIENTS, section=I
225., 450., 190., 190., 14.6, 14.6, 9.4
0.,-1.,0.
** Section: IPE500_WIRE  Profile: IPE500
*Beam Section, elset=_PickedSet3_#53, material=CS355, temperature=GRADIENTS, section=I
250., 500., 200., 200., 16., 16., 10.2
0.,-1.,0.
** Section: HEA500_WIRE  Profile: HEA500
*Beam Section, elset=_PickedSet4_#54, material=CS355, temperature=GRADIENTS, section=I
245., 490., 300., 300., 23., 23., 12.
0.,-1.,0.
** Section: IPE550_WIRE  Profile: IPE550
*Beam Section, elset=_PickedSet3_#40, material=CS355, temperature=GRADIENTS, section=I
275., 550., 210., 210., 17.2, 17.2, 11.1
0.,-1.,0.
** Section: HEA500_WIRE  Profile: HEA500
*Beam Section, elset=_PickedSet4_#41, material=CS355, temperature=GRADIENTS, section=I
245., 490., 300., 300., 23., 23., 12.
0.,-1.,0.
** Section: HEM360  Profile: HEM360
*Beam Section, elset=_PickedSet2_#39, material=CS355, temperature=GRADIENTS, section=I
197.5, 395., 308., 308., 40., 40., 21.
0.,-1.,0.
** Section: HEM360  Profile: HEM360
*Beam Section, elset=_PickedSet2_#52, material=CS355, temperature=GRADIENTS, section=I
197.5, 395., 308., 308., 40., 40., 21.
0.,-1.,0.
** Section: IPE330_WIRE  Profile: IPE330
*Beam Section, elset=_PickedSet3_#89, material=CS355, temperature=GRADIENTS, section=I
165., 330., 160., 160., 11.5, 11.5, 7.5
0.,-1.,0.
** Section: HEA360_WIRE  Profile: HEA360
*Beam Section, elset=_PickedSet2_#88, material=CS355, temperature=GRADIENTS, section=I
175., 350., 300., 300., 17.5, 17.5, 10.
0.,-1.,0.
** Section: IPE450_WIRE  Profile: IPE450
*Beam Section, elset=_PickedSet4_#90, material=CS355, temperature=GRADIENTS, section=I
225., 450., 190., 190., 14.6, 14.6, 9.4
0.,-1.,0.
** Section: HEA360_WIRE  Profile: HEA360
*Beam Section, elset=_PickedSet2_#74, material=CS355, temperature=GRADIENTS, section=I
175., 350., 300., 300., 17.5, 17.5, 10.
0.,-1.,0.
** Section: IPE400_WIRE  Profile: IPE400
*Beam Section, elset=_PickedSet3_#75, material=CS355, temperature=GRADIENTS, section=I
200., 400., 180., 180., 13.5, 13.5, 8.6
0.,-1.,0.
** Section: HEA450_WIRE  Profile: HEA450
*Beam Section, elset=_PickedSet4_#76, material=CS355, temperature=GRADIENTS, section=I
220., 440., 300., 300., 21., 21., 11.5
0.,-1.,0.
** Section: HEA360_WIRE  Profile: HEA360
*Beam Section, elset=_PickedSet2_#61, material=CS355, temperature=GRADIENTS, section=I
175., 350., 300., 300., 17.5, 17.5, 10.
0.,-1.,0.
** Section: HEA500_WIRE  Profile: HEA500
*Beam Section, elset=_PickedSet4_#63, material=CS355, temperature=GRADIENTS, section=I
245., 490., 300., 300., 23., 23., 12.
0.,-1.,0.
** Section: IPE450_WIRE  Profile: IPE450
*Beam Section, elset=_PickedSet3_#62, material=CS355, temperature=GRADIENTS, section=I
225., 450., 190., 190., 14.6, 14.6, 9.4
0.,-1.,0.
** Section: IPE500_WIRE  Profile: IPE500
*Beam Section, elset=_PickedSet3_#49, material=CS355, temperature=GRADIENTS, section=I
250., 500., 200., 200., 16., 16., 10.2
0.,-1.,0.
** Section: HEA500_WIRE  Profile: HEA500
*Beam Section, elset=_PickedSet4_#50, material=CS355, temperature=GRADIENTS, section=I
245., 490., 300., 300., 23., 23., 12.
0.,-1.,0.
** Section: IPE550_WIRE  Profile: IPE550
*Beam Section, elset=_PickedSet3_#35, material=CS355, temperature=GRADIENTS, section=I
275., 550., 210., 210., 17.2, 17.2, 11.1
0.,-1.,0.
** Section: HEA500_WIRE  Profile: HEA500
*Beam Section, elset=_PickedSet5_#37, material=CS355, temperature=GRADIENTS, section=I
245., 490., 300., 300., 23., 23., 12.
0.,-1.,0.
** Section: HEM360  Profile: HEM360
*Beam Section, elset=_PickedSet2_#34, material=CS355, temperature=GRADIENTS, section=I
197.5, 395., 308., 308., 40., 40., 21.
0.,-1.,0.
** Section: HEM360  Profile: HEM360
*Beam Section, elset=_PickedSet2_#48, material=CS355, temperature=GRADIENTS, section=I
197.5, 395., 308., 308., 40., 40., 21.
0.,-1.,0.
** Section: Interstiff
*Shell Section, elset=_PickedSet73, material=ASS
10., 5
** Section: IPE330_Flange
*Shell Section, elset=_PickedSet2_#87, material=ASS
11.5, 5
** Section: IPE400_Flange
*Shell Section, elset=_PickedSet2_#73, material=ASS
13.5, 5
*End Instance
**
*Nset, nset=BASE, instance=EBF_2_2_2-1
 285, 296
*Nset, nset=DISROFF, instance=EBF_2_2_2-1
 287,
*Nset, nset=RS1, instance=EBF_2_2_2-1
    1,    2,    3,    7,    9,   10
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*Elset, elset=RS1, instance=EBF_2_2_2-1
   37,   38,   39,   40,   41,   42
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*Nset, nset=RS2, instance=EBF_2_2_2-1
    3,    6,    7,    8,    9,   11
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*Elset, elset=RS2, instance=EBF_2_2_2-1
   57,   58,   59,   60,   61,   62
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*Nset, nset=RS3, instance=EBF_2_2_2-1
    4,    5,   15,   16,   56,   57
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*Elset, elset=RS3, instance=EBF_2_2_2-1
 2300, 2301, 2302, 2303, 2304, 2305
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*Nset, nset=RS4, instance=EBF_2_2_2-1
    4,    5,    6,    8,   11,   13
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*Elset, elset=RS4, instance=EBF_2_2_2-1
  954,  956,  958,  960,  962,  964
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*Nset, nset=_PickedSet471, internal, instance=EBF_2_2_2-1
  150,  151,  152,  199,  200,  201
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*Elset, elset=_PickedSet471, internal, instance=EBF_2_2_2-1, generate
 4446,  4529,     1
*Nset, nset=_PickedSet472, internal, instance=EBF_2_2_2-1
 234,
*Nset, nset=_PickedSet473, internal, instance=EBF_2_2_2-1
  126,  127,  132,  133,  134,  139
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*Elset, elset=_PickedSet473, internal, instance=EBF_2_2_2-1
 1102, 1103, 4209, 4210, 4211, 4212
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*Nset, nset=_PickedSet474, internal, instance=EBF_2_2_2-1
 242,
*Nset, nset=_PickedSet475, internal, instance=EBF_2_2_2-1
  103,  104,  214,  215,  216,  217
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*Elset, elset=_PickedSet475, internal, instance=EBF_2_2_2-1, generate
 3818,  3889,     1
*Nset, nset=_PickedSet476, internal, instance=EBF_2_2_2-1
 249,
*Nset, nset=_PickedSet477, internal, instance=EBF_2_2_2-1
   71,   72,   73,   76,   77,   88
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*Elset, elset=_PickedSet477, internal, instance=EBF_2_2_2-1, generate
 8483,  8543,     1
*Nset, nset=_PickedSet478, internal, instance=EBF_2_2_2-1
 254,
*Nset, nset=_PickedSet479, internal, instance=EBF_2_2_2-1
   35,   36,   37,   38,   39,   40
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*Elset, elset=_PickedSet479, internal, instance=EBF_2_2_2-1, generate
 8376,  8421,     1
*Nset, nset=_PickedSet480, internal, instance=EBF_2_2_2-1
 264,
*Nset, nset=_PickedSet481, internal, instance=EBF_2_2_2-1
  177,  178,  179,  184,  185,  186
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*Elset, elset=_PickedSet481, internal, instance=EBF_2_2_2-1, generate
 4530,  4613,     1
*Nset, nset=_PickedSet482, internal, instance=EBF_2_2_2-1
 237,
*Nset, nset=_PickedSet483, internal, instance=EBF_2_2_2-1
  121,  122,  123,  124,  125,  219
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*Elset, elset=_PickedSet483, internal, instance=EBF_2_2_2-1
 1076, 2191, 2192, 4125, 4126, 4127
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*Nset, nset=_PickedSet484, internal, instance=EBF_2_2_2-1
 243,
*Nset, nset=_PickedSet485, internal, instance=EBF_2_2_2-1
   17,   18,   19,   20,   21,   22
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*Elset, elset=_PickedSet485, internal, instance=EBF_2_2_2-1, generate
 3890,  3961,     1
*Nset, nset=_PickedSet486, internal, instance=EBF_2_2_2-1
 248,
*Nset, nset=_PickedSet487, internal, instance=EBF_2_2_2-1
   64,   65,   74,   75,   82,   83
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*Elset, elset=_PickedSet487, internal, instance=EBF_2_2_2-1, generate
 8422,  8482,     1
*Nset, nset=_PickedSet488, internal, instance=EBF_2_2_2-1
 255,
*Nset, nset=_PickedSet489, internal, instance=EBF_2_2_2-1
  202,  203,  204,  205,  206,  207
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*Elset, elset=_PickedSet489, internal, instance=EBF_2_2_2-1
 2055, 8330, 8331, 8332, 8333, 8334
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*Nset, nset=_PickedSet490, internal, instance=EBF_2_2_2-1
 265,
*Nset, nset=_PickedSet545, internal, instance=EBF_2_2_2-1
 285, 296
*Nset, nset=_PickedSet549, internal, instance=EBF_2_2_2-1
  234,  237,  242,  243,  248,  249
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*Elset, elset=_PickedSet549, internal, instance=EBF_2_2_2-1, generate
 4750,  8237,     1
*Nset, nset=_PickedSet550, internal, instance=EBF_2_2_2-1
 234, 242, 249, 254, 264
*Nset, nset=_PickedSet551, internal, instance=EBF_2_2_2-1
 237, 243, 248, 255, 265
*Surface, type=NODE, name=_PickedSet471_CNS_, internal
_PickedSet471, 1.
*Surface, type=NODE, name=_PickedSet473_CNS_, internal
_PickedSet473, 1.
*Surface, type=NODE, name=_PickedSet475_CNS_, internal
_PickedSet475, 1.
*Surface, type=NODE, name=_PickedSet477_CNS_, internal
_PickedSet477, 1.
*Surface, type=NODE, name=_PickedSet479_CNS_, internal
_PickedSet479, 1.
*Surface, type=NODE, name=_PickedSet481_CNS_, internal
_PickedSet481, 1.
*Surface, type=NODE, name=_PickedSet483_CNS_, internal
_PickedSet483, 1.
*Surface, type=NODE, name=_PickedSet485_CNS_, internal
_PickedSet485, 1.
*Surface, type=NODE, name=_PickedSet487_CNS_, internal
_PickedSet487, 1.
*Surface, type=NODE, name=_PickedSet489_CNS_, internal
_PickedSet489, 1.
** Constraint: LE1
*Coupling, constraint name=LE1, ref node=_PickedSet472, surface=_PickedSet471_CNS_
*Kinematic
** Constraint: LE2
*Coupling, constraint name=LE2, ref node=_PickedSet474, surface=_PickedSet473_CNS_
*Kinematic
** Constraint: LE3
*Coupling, constraint name=LE3, ref node=_PickedSet476, surface=_PickedSet475_CNS_
*Kinematic
** Constraint: LE4
*Coupling, constraint name=LE4, ref node=_PickedSet478, surface=_PickedSet477_CNS_
*Kinematic
** Constraint: LE5
*Coupling, constraint name=LE5, ref node=_PickedSet480, surface=_PickedSet479_CNS_
*Kinematic
** Constraint: RE1
*Coupling, constraint name=RE1, ref node=_PickedSet482, surface=_PickedSet481_CNS_
*Kinematic
** Constraint: RE2
*Coupling, constraint name=RE2, ref node=_PickedSet484, surface=_PickedSet483_CNS_
*Kinematic
** Constraint: RE3
*Coupling, constraint name=RE3, ref node=_PickedSet486, surface=_PickedSet485_CNS_
*Kinematic
** Constraint: RE4
*Coupling, constraint name=RE4, ref node=_PickedSet488, surface=_PickedSet487_CNS_
*Kinematic
** Constraint: RE5
*Coupling, constraint name=RE5, ref node=_PickedSet490, surface=_PickedSet489_CNS_
*Kinematic
*Element, type=MASS, elset=_PickedSet513_MASS_
1, EBF_2_2_2-1.276
2, EBF_2_2_2-1.287
*Mass, elset=_PickedSet513_MASS_
283.994,
*Element, type=MASS, elset=_PickedSet509_MASS1_
3, EBF_2_2_2-1.283
4, EBF_2_2_2-1.294
*Mass, elset=_PickedSet509_MASS1_
283.994,
*Element, type=MASS, elset=_PickedSet510_MASS2_
5, EBF_2_2_2-1.280
6, EBF_2_2_2-1.291
*Mass, elset=_PickedSet510_MASS2_
283.994,
*Element, type=MASS, elset=_PickedSet511_MASS3_
7, EBF_2_2_2-1.278
8, EBF_2_2_2-1.289
*Mass, elset=_PickedSet511_MASS3_
283.994,
*Element, type=MASS, elset=_PickedSet512_MASS4_
9, EBF_2_2_2-1.277
10, EBF_2_2_2-1.288
*Mass, elset=_PickedSet512_MASS4_
283.994,
*End Assembly
**
** MATERIALS
**
*Material, name=ASS
*Density
 7.9e-09,
*Elastic
184153., 0.3
*Plastic, hardening=COMBINED, datatype=PARAMETERS, number backstresses=1
360., 53611.1,    185.
*Cyclic Hardening, parameters
360., 111.1,  1.56
*Material, name=CS355
*Density
 7.85e-09,
*Elastic
210000., 0.3
*Plastic
   355.,       0.
   355.,   0.0015
  390.5, 0.001897
 480.74,  0.03875
   561.,     0.11
 538.42,     0.17
  0.001, 0.193902
*Material, name=CS355_Cyclic
*Density
 7.85e-09,
*Elastic
210000., 0.3
*Plastic, hardening=COMBINED, datatype=PARAMETERS, number backstresses=3
386.,5327.,  75.,1725.,  16.,1120.,  10.
*Cyclic Hardening, parameters
386., 20.8,  3.2
**
** BOUNDARY CONDITIONS
**
** Name: Pinned Type: Displacement/Rotation
*Boundary
_PickedSet545, 1, 1
_PickedSet545, 2, 2
_PickedSet545, 3, 3
** Name: Stability Type: Displacement/Rotation
*Boundary
_PickedSet549, 2, 2
_PickedSet549, 4, 4
_PickedSet549, 6, 6
** ----------------------------------------------------------------
**
** STEP: Buckle
**
*Step, name=Buckle, nlgeom=NO, perturbation
*Buckle
50, , 500, 700
**
** BOUNDARY CONDITIONS
**
** Name: LD Type: Displacement/Rotation
*Boundary, op=NEW, load case=1
_PickedSet550, 3, 3, 1.
*Boundary, op=NEW, load case=2
_PickedSet550, 3, 3, 1.
** Name: Pinned Type: Displacement/Rotation
*Boundary, op=NEW, load case=1
_PickedSet545, 1, 1
_PickedSet545, 2, 2
_PickedSet545, 3, 3
*Boundary, op=NEW, load case=2
_PickedSet545, 1, 1
_PickedSet545, 2, 2
_PickedSet545, 3, 3
** Name: RD Type: Displacement/Rotation
*Boundary, op=NEW, load case=1
_PickedSet551, 3, 3, -1.
*Boundary, op=NEW, load case=2
_PickedSet551, 3, 3, -1.
** Name: Stability Type: Displacement/Rotation
*Boundary, op=NEW, load case=1
_PickedSet549, 2, 2
_PickedSet549, 4, 4
_PickedSet549, 6, 6
*Boundary, op=NEW, load case=2
_PickedSet549, 2, 2
_PickedSet549, 4, 4
_PickedSet549, 6, 6
**
** OUTPUT REQUESTS
**
*Restart, write, frequency=0
**
** FIELD OUTPUT: F-Output-1
**
*Output, field, variable=PRESELECT
*Node File
U
*End Step
