*Heading
** Generated by MatchFEM tool. The Grid

*Part, name=slab_sdb
*NODE
1,-12000.0,-12000.0,     0.0
2,-11000.0,-12000.0,     0.0
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
*ELEMENT,  TYPE=S4R
1,       1,       2,       3,       4
2,       4,       3,       5,       6
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
*ELSET, ELSET=set0
   1,   2,   3,   4,   5,   6
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*Shell Section, ELSET=set0, MATERIAL=A_4000Psi
250.0

*End Part

*ASSEMBLY, NAME=slab_sdb

*INSTANCE, NAME=slab_sdb-1, PART=slab_sdb

*END INSTANCE

*NSET, NSET=BCnode-1, instance=slab_sdb-1
   1,
*NSET, NSET=BCnode-19, instance=slab_sdb-1
  19,
*NSET, NSET=BCnode-37, instance=slab_sdb-1
  37,
*NSET, NSET=BCnode-55, instance=slab_sdb-1
  55,
*NSET, NSET=BCnode-99, instance=slab_sdb-1
  99,
*NSET, NSET=BCnode-109, instance=slab_sdb-1
 109,
*NSET, NSET=BCnode-121, instance=slab_sdb-1
 121,
*NSET, NSET=BCnode-133, instance=slab_sdb-1
 133,
*NSET, NSET=BCnode-213, instance=slab_sdb-1
 213,
*NSET, NSET=BCnode-223, instance=slab_sdb-1
 223,
*NSET, NSET=BCnode-235, instance=slab_sdb-1
 235,
*NSET, NSET=BCnode-247, instance=slab_sdb-1
 247,
*NSET, NSET=BCnode-327, instance=slab_sdb-1
 327,
*NSET, NSET=BCnode-337, instance=slab_sdb-1
 337,
*NSET, NSET=BCnode-349, instance=slab_sdb-1
 349,
*NSET, NSET=BCnode-361, instance=slab_sdb-1
 361,

*END ASSEMBLY

*MATERIAL, NAME=A_4000Psi
*DENSITY
2.4027696e-09,
*ELASTIC, TYPE=ISOTROPIC
24855.578, 0.2
**
** BOUNDARY CONDITIONS
**
** Name: BC-1 Type: Displacement/Rotation
*Boundary
BCnode-1, 1, 1
BCnode-1, 2, 2
BCnode-1, 3, 3
BCnode-1, 4, 4
BCnode-1, 5, 5
BCnode-1, 6, 6
** Name: BC-2 Type: Displacement/Rotation
*Boundary
BCnode-19, 1, 1
BCnode-19, 2, 2
BCnode-19, 3, 3
BCnode-19, 4, 4
BCnode-19, 5, 5
BCnode-19, 6, 6
** Name: BC-3 Type: Displacement/Rotation
*Boundary
BCnode-37, 1, 1
BCnode-37, 2, 2
BCnode-37, 3, 3
BCnode-37, 4, 4
BCnode-37, 5, 5
BCnode-37, 6, 6
** Name: BC-4 Type: Displacement/Rotation
*Boundary
BCnode-55, 1, 1
BCnode-55, 2, 2
BCnode-55, 3, 3
BCnode-55, 4, 4
BCnode-55, 5, 5
BCnode-55, 6, 6
** Name: BC-5 Type: Displacement/Rotation
*Boundary
BCnode-99, 1, 1
BCnode-99, 2, 2
BCnode-99, 3, 3
BCnode-99, 4, 4
BCnode-99, 5, 5
BCnode-99, 6, 6
** Name: BC-6 Type: Displacement/Rotation
*Boundary
BCnode-109, 1, 1
BCnode-109, 2, 2
BCnode-109, 3, 3
BCnode-109, 4, 4
BCnode-109, 5, 5
BCnode-109, 6, 6
** Name: BC-7 Type: Displacement/Rotation
*Boundary
BCnode-121, 1, 1
BCnode-121, 2, 2
BCnode-121, 3, 3
BCnode-121, 4, 4
BCnode-121, 5, 5
BCnode-121, 6, 6
** Name: BC-8 Type: Displacement/Rotation
*Boundary
BCnode-133, 1, 1
BCnode-133, 2, 2
BCnode-133, 3, 3
BCnode-133, 4, 4
BCnode-133, 5, 5
BCnode-133, 6, 6
** Name: BC-9 Type: Displacement/Rotation
*Boundary
BCnode-213, 1, 1
BCnode-213, 2, 2
BCnode-213, 3, 3
BCnode-213, 4, 4
BCnode-213, 5, 5
BCnode-213, 6, 6
** Name: BC-10 Type: Displacement/Rotation
*Boundary
BCnode-223, 1, 1
BCnode-223, 2, 2
BCnode-223, 3, 3
BCnode-223, 4, 4
BCnode-223, 5, 5
BCnode-223, 6, 6
** Name: BC-11 Type: Displacement/Rotation
*Boundary
BCnode-235, 1, 1
BCnode-235, 2, 2
BCnode-235, 3, 3
BCnode-235, 4, 4
BCnode-235, 5, 5
BCnode-235, 6, 6
** Name: BC-12 Type: Displacement/Rotation
*Boundary
BCnode-247, 1, 1
BCnode-247, 2, 2
BCnode-247, 3, 3
BCnode-247, 4, 4
BCnode-247, 5, 5
BCnode-247, 6, 6
** Name: BC-13 Type: Displacement/Rotation
*Boundary
BCnode-327, 1, 1
BCnode-327, 2, 2
BCnode-327, 3, 3
BCnode-327, 4, 4
BCnode-327, 5, 5
BCnode-327, 6, 6
** Name: BC-14 Type: Displacement/Rotation
*Boundary
BCnode-337, 1, 1
BCnode-337, 2, 2
BCnode-337, 3, 3
BCnode-337, 4, 4
BCnode-337, 5, 5
BCnode-337, 6, 6
** Name: BC-15 Type: Displacement/Rotation
*Boundary
BCnode-349, 1, 1
BCnode-349, 2, 2
BCnode-349, 3, 3
BCnode-349, 4, 4
BCnode-349, 5, 5
BCnode-349, 6, 6
** Name: BC-16 Type: Displacement/Rotation
*Boundary
BCnode-361, 1, 1
BCnode-361, 2, 2
BCnode-361, 3, 3
BCnode-361, 4, 4
BCnode-361, 5, 5
BCnode-361, 6, 6
*Step, name=Step-1, nlgeom=NO, inc=5
*Static, direct
0.2, 1.,
**
** LOADS
**
**
** OUTPUT REQUESTS
**
*RESTART, WRITE, FREQUENCY=0
**
** FIELD OUTPUT
**
*OUTPUT, FIELD, VARIABLE=PRESELECT
**
** HISTORY OUTPUT
**
*OUTPUT, HISTORY, VARIABLE=PRESELECT
*END STEP
