*Heading
** Generated by MatchFEM tool. The Grid

*Part, name=Cementerio_Mompox_sdb
*NODE
5,-115353.0,2131.4305,  3100.0
6,-115353.0,27463.794,  3100.0
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
*ELEMENT,  TYPE=B31
202934,      61,       7
202936,      62,      63
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
*ELEMENT,  TYPE=S4R
546,     122,     739,     740,     741
547,     741,     740,     742,     743
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
*ELSET, ELSET=set0
216753,216755,216757,202934,216759,202936
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*ELSET, ELSET=set1
1058,1059,1066,1067,1321,1322
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*ELSET, ELSET=set2
1169,1170,1171,1172,1173,1174
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*ELSET, ELSET=set3
 940, 941, 942, 943, 944, 945
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*ELSET, ELSET=set4
1703,1704,1705,1706,1707,1708
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*ELSET, ELSET=set5
1152,1153,1154,1155,1156,1163
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*ELSET, ELSET=set6
 967,1375,1364,1365,1366, 956
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*ELSET, ELSET=set7
1024,1025,1410,1411,1412,1413
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*ELSET, ELSET=set8
 546, 547, 548, 549, 550, 551
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** Section: C 30x40cm_A_4000Psi  Profile: C 30x40cm_A_4000Psi
*Beam General Section, elset=set0, material=A_4000Psi, section=RECT
400.0, 300.0
1.0, 0.0, 0.0
** Section: V 20x45cm_A_4000Psi  Profile: V 20x45cm_A_4000Psi
*Beam General Section, elset=set1, material=A_4000Psi, section=RECT
450.0, 200.0
0.0, 1.0, 0.0
** Section: V 20x45cm_A_4000Psi  Profile: V 20x45cm_A_4000Psi
*Beam General Section, elset=set2, material=A_4000Psi, section=RECT
450.0, 200.0
1.0, 0.0, 0.0
** Section: V 30x45cm_A_4000Psi  Profile: V 30x45cm_A_4000Psi
*Beam General Section, elset=set3, material=A_4000Psi, section=RECT
450.0, 300.0
0.0, -1.0, 0.0
** Section: V 20x45cm_A_4000Psi  Profile: V 20x45cm_A_4000Psi
*Beam General Section, elset=set4, material=A_4000Psi, section=RECT
450.0, 200.0
-1.0, 0.0, 0.0
** Section: V 30x45cm_A_4000Psi  Profile: V 30x45cm_A_4000Psi
*Beam General Section, elset=set5, material=A_4000Psi, section=RECT
450.0, 300.0
1.0, 0.0, 0.0
** Section: V 30x45cm_A_4000Psi  Profile: V 30x45cm_A_4000Psi
*Beam General Section, elset=set6, material=A_4000Psi, section=RECT
450.0, 300.0
0.0, 1.0, 0.0
** Section: V 20x45cm_A_4000Psi  Profile: V 20x45cm_A_4000Psi
*Beam General Section, elset=set7, material=A_4000Psi, section=RECT
450.0, 200.0
0.0, -1.0, 0.0
*Shell Section, ELSET=set8, MATERIAL=A_4000Psi
100.0

*End Part

*ASSEMBLY, NAME=Cementerio_Mompox_sdb

*INSTANCE, NAME=Cementerio_Mompox_sdb-1, PART=Cementerio_Mompox_sdb

*END INSTANCE

*NSET, NSET=BCnode-48, instance=Cementerio_Mompox_sdb-1
  48,
*NSET, NSET=BCnode-52, instance=Cementerio_Mompox_sdb-1
  52,
*NSET, NSET=BCnode-61, instance=Cementerio_Mompox_sdb-1
  61,
*NSET, NSET=BCnode-62, instance=Cementerio_Mompox_sdb-1
  62,
*NSET, NSET=BCnode-64, instance=Cementerio_Mompox_sdb-1
  64,
*NSET, NSET=BCnode-65, instance=Cementerio_Mompox_sdb-1
  65,
*NSET, NSET=BCnode-67, instance=Cementerio_Mompox_sdb-1
  67,
*NSET, NSET=BCnode-69, instance=Cementerio_Mompox_sdb-1
  69,
*NSET, NSET=BCnode-71, instance=Cementerio_Mompox_sdb-1
  71,
*NSET, NSET=BCnode-73, instance=Cementerio_Mompox_sdb-1
  73,
*NSET, NSET=BCnode-75, instance=Cementerio_Mompox_sdb-1
  75,
*NSET, NSET=BCnode-77, instance=Cementerio_Mompox_sdb-1
  77,
*NSET, NSET=BCnode-79, instance=Cementerio_Mompox_sdb-1
  79,
*NSET, NSET=BCnode-81, instance=Cementerio_Mompox_sdb-1
  81,
*NSET, NSET=BCnode-83, instance=Cementerio_Mompox_sdb-1
  83,
*NSET, NSET=BCnode-85, instance=Cementerio_Mompox_sdb-1
  85,
*NSET, NSET=BCnode-86, instance=Cementerio_Mompox_sdb-1
  86,
*NSET, NSET=BCnode-88, instance=Cementerio_Mompox_sdb-1
  88,
*NSET, NSET=BCnode-89, instance=Cementerio_Mompox_sdb-1
  89,
*NSET, NSET=BCnode-91, instance=Cementerio_Mompox_sdb-1
  91,
*NSET, NSET=BCnode-311, instance=Cementerio_Mompox_sdb-1
 311,
*NSET, NSET=BCnode-312, instance=Cementerio_Mompox_sdb-1
 312,

*END ASSEMBLY

*MATERIAL, NAME=A_4000Psi
*DENSITY
2.4473189e-09,
*ELASTIC, TYPE=ISOTROPIC
20636.9, 0.2
**
** BOUNDARY CONDITIONS
**
** Name: BC-1 Type: Displacement/Rotation
*Boundary
BCnode-48, 3, 3
** Name: BC-2 Type: Displacement/Rotation
*Boundary
BCnode-52, 3, 3
** Name: BC-3 Type: Displacement/Rotation
*Boundary
BCnode-61, 1, 1
BCnode-61, 2, 2
BCnode-61, 3, 3
BCnode-61, 4, 4
BCnode-61, 5, 5
BCnode-61, 6, 6
** Name: BC-4 Type: Displacement/Rotation
*Boundary
BCnode-62, 1, 1
BCnode-62, 2, 2
BCnode-62, 3, 3
BCnode-62, 4, 4
BCnode-62, 5, 5
BCnode-62, 6, 6
** Name: BC-5 Type: Displacement/Rotation
*Boundary
BCnode-64, 1, 1
BCnode-64, 2, 2
BCnode-64, 3, 3
BCnode-64, 4, 4
BCnode-64, 5, 5
BCnode-64, 6, 6
** Name: BC-6 Type: Displacement/Rotation
*Boundary
BCnode-65, 1, 1
BCnode-65, 2, 2
BCnode-65, 3, 3
BCnode-65, 4, 4
BCnode-65, 5, 5
BCnode-65, 6, 6
** Name: BC-7 Type: Displacement/Rotation
*Boundary
BCnode-67, 1, 1
BCnode-67, 2, 2
BCnode-67, 3, 3
BCnode-67, 4, 4
BCnode-67, 5, 5
BCnode-67, 6, 6
** Name: BC-8 Type: Displacement/Rotation
*Boundary
BCnode-69, 1, 1
BCnode-69, 2, 2
BCnode-69, 3, 3
BCnode-69, 4, 4
BCnode-69, 5, 5
BCnode-69, 6, 6
** Name: BC-9 Type: Displacement/Rotation
*Boundary
BCnode-71, 1, 1
BCnode-71, 2, 2
BCnode-71, 3, 3
BCnode-71, 4, 4
BCnode-71, 5, 5
BCnode-71, 6, 6
** Name: BC-10 Type: Displacement/Rotation
*Boundary
BCnode-73, 1, 1
BCnode-73, 2, 2
BCnode-73, 3, 3
BCnode-73, 4, 4
BCnode-73, 5, 5
BCnode-73, 6, 6
** Name: BC-11 Type: Displacement/Rotation
*Boundary
BCnode-75, 1, 1
BCnode-75, 2, 2
BCnode-75, 3, 3
BCnode-75, 4, 4
BCnode-75, 5, 5
BCnode-75, 6, 6
** Name: BC-12 Type: Displacement/Rotation
*Boundary
BCnode-77, 1, 1
BCnode-77, 2, 2
BCnode-77, 3, 3
BCnode-77, 4, 4
BCnode-77, 5, 5
BCnode-77, 6, 6
** Name: BC-13 Type: Displacement/Rotation
*Boundary
BCnode-79, 1, 1
BCnode-79, 2, 2
BCnode-79, 3, 3
BCnode-79, 4, 4
BCnode-79, 5, 5
BCnode-79, 6, 6
** Name: BC-14 Type: Displacement/Rotation
*Boundary
BCnode-81, 1, 1
BCnode-81, 2, 2
BCnode-81, 3, 3
BCnode-81, 4, 4
BCnode-81, 5, 5
BCnode-81, 6, 6
** Name: BC-15 Type: Displacement/Rotation
*Boundary
BCnode-83, 1, 1
BCnode-83, 2, 2
BCnode-83, 3, 3
BCnode-83, 4, 4
BCnode-83, 5, 5
BCnode-83, 6, 6
** Name: BC-16 Type: Displacement/Rotation
*Boundary
BCnode-85, 1, 1
BCnode-85, 2, 2
BCnode-85, 3, 3
BCnode-85, 4, 4
BCnode-85, 5, 5
BCnode-85, 6, 6
** Name: BC-17 Type: Displacement/Rotation
*Boundary
BCnode-86, 1, 1
BCnode-86, 2, 2
BCnode-86, 3, 3
BCnode-86, 4, 4
BCnode-86, 5, 5
BCnode-86, 6, 6
** Name: BC-18 Type: Displacement/Rotation
*Boundary
BCnode-88, 1, 1
BCnode-88, 2, 2
BCnode-88, 3, 3
BCnode-88, 4, 4
BCnode-88, 5, 5
BCnode-88, 6, 6
** Name: BC-19 Type: Displacement/Rotation
*Boundary
BCnode-89, 1, 1
BCnode-89, 2, 2
BCnode-89, 3, 3
BCnode-89, 4, 4
BCnode-89, 5, 5
BCnode-89, 6, 6
** Name: BC-20 Type: Displacement/Rotation
*Boundary
BCnode-91, 1, 1
BCnode-91, 2, 2
BCnode-91, 3, 3
BCnode-91, 4, 4
BCnode-91, 5, 5
BCnode-91, 6, 6
** Name: BC-21 Type: Displacement/Rotation
*Boundary
BCnode-311, 3, 3
** Name: BC-22 Type: Displacement/Rotation
*Boundary
BCnode-312, 3, 3
*Step, name=Step-1, nlgeom=NO, inc=5
*Static, direct
0.2, 1.,
**
** LOADS
**
**
** OUTPUT REQUESTS
**
*RESTART, WRITE, FREQUENCY=0
**
** FIELD OUTPUT
**
*OUTPUT, FIELD, VARIABLE=PRESELECT
**
** HISTORY OUTPUT
**
*OUTPUT, HISTORY, VARIABLE=PRESELECT
*END STEP
